OpenVSP model (file version 5), 18 components.
Geometry view with OpenVSP parameter names; values to 6 digits, angles in degrees, lengths in the model's unit.
Overall bounding box: X_Min=-1.43195 X_Len=3.87037 Y_Min=-37.7808 Y_Len=75.5615 Z_Min=-1.43195 Z_Len=3.99333

Wing "main_wing"
  location (X Y Z) 0 0 0, rotation 0 0 0
  symmetric about XZ
  bounding box size 2.43809 75.5615 2.62495
  totals: TotalSpan=75.6898 TotalProjectedSpan=75.2856 TotalChord=2.4384 TotalArea=184.562 TotalAR=30.7101
  root: chord 2.4384, twist 0, airfoil file "SD6080 (9.2%)"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 BaseThickChord=0.091841 ThickChord=0.15
  sections:
    n  Span     Root_Chord  Tip_Chord  Area     Sweep  Sweep_Location  Dihedral  Twist  Twist_Location  tip airfoil
    1  24.5431  2.4384      2.4384     59.8459  0      0.25            0         0      0.25            airfoil file "SD6080 (9.2%)"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 BaseThickChord=0.091841 ThickChord=0.12
    2  13.3018  2.4384      2.4384     32.4351  0      0.25            10        5      0.25            airfoil file "SD6080 (9.2%)"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 BaseThickChord=0.091841 ThickChord=0.115

Wing "vertical_stabilizer_1"
  location (X Y Z) -1.43195 0 -1.43195, rotation 90 0 0
  bounding box size 3.85841 0.409415 1.57814
  totals: TotalSpan=1.43195 TotalProjectedSpan=1.43195 TotalChord=2.45481 TotalArea=3.51517 TotalAR=0.583323
  root: chord 2.45481, twist 0, NACA 4-series Camber=0 CamberLoc=0.2 ThickChord=0.16662
  sections:
    n  Span     Root_Chord  Tip_Chord  Area     Sweep   Sweep_Location  Dihedral  Twist  Twist_Location  tip airfoil
    1  1.43195  2.45481     2.45481    3.51517  44.427  0.25            0         0      0.25            as above

Wing "vertical_stabilizer_2"
  location (X Y Z) -1.43195 12.274 -1.43195, rotation 90 0 0
  symmetric about XZ
  bounding box size 3.85841 24.9574 1.57814
  totals: TotalSpan=2.8639 TotalProjectedSpan=2.8639 TotalChord=2.45481 TotalArea=7.03034 TotalAR=1.16665
  root: chord 2.45481, twist 0, NACA 4-series Camber=0 CamberLoc=0.2 ThickChord=0.16662
  sections:
    n  Span     Root_Chord  Tip_Chord  Area     Sweep   Sweep_Location  Dihedral  Twist  Twist_Location  tip airfoil
    1  1.43195  2.45481     2.45481    3.51517  44.427  0.25            0         0      0.25            as above

Wing "vertical_stabilizer_3"
  location (X Y Z) -1.43195 24.548 -1.43195, rotation 90 0 0
  symmetric about XZ
  bounding box size 3.85841 49.5054 1.57814
  totals: TotalSpan=2.8639 TotalProjectedSpan=2.8639 TotalChord=2.45481 TotalArea=7.03034 TotalAR=1.16665
  root: chord 2.45481, twist 0, NACA 4-series Camber=0 CamberLoc=0.2 ThickChord=0.16662
  sections:
    n  Span     Root_Chord  Tip_Chord  Area     Sweep   Sweep_Location  Dihedral  Twist  Twist_Location  tip airfoil
    1  1.43195  2.45481     2.45481    3.51517  44.427  0.25            0         0      0.25            as above

Propeller "PropGeom"
  location (X Y Z) -0.40843 -4.09133 0, rotation 0 0 0
  bounding box size 0.133522 2.01401 0.0793851
  Design: Diameter=2.0066 NumBlade=2 Beta34=59.2307 UseBeta34Flag=1 Feather=0.0153794 Rotate=0 Precone=0 ReverseFlag=0 FoldAngle=0 PropMode=0 AF=95.2823 CLi=0.69888 Chord=0.100373 Solidity=0.0638996 ConstructXoC=0.5 FeatherAxisXoC=0.5 FeatherOffsetXoC=0
  cross sections:
    n  RadiusFrac  shape
    0  0.101266    NACA 16-series Chord=0.00804175 IdealCl=0.7 ThickChord=0.0910515
    1  1           NACA 16-series Chord=0.082354 IdealCl=0.7 ThickChord=0.0910515
  Chord along r/R (PCHIP): 0.101266: 0.0080153, 0.146203: 0.0162198, 0.191139: 0.0267445, 0.236076: 0.0391114, 0.281013: 0.0527958, 0.325949: 0.0672499, 0.370886: 0.0819254, 0.415823: 0.0962918, 0.460759: 0.109851, 0.505696: 0.122138, 0.550633: 0.132731, 0.59557: 0.141274, 0.640506: 0.147428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
  Twist along r/R (PCHIP): 0.101266: 89.3487, 0.146203: 87.0274, 0.191139: 84.731, 0.236076: 82.4662, 0.281013: 80.2394, 0.325949: 78.0561, 0.370886: 75.9212, 0.415823: 73.8388, 0.460759: 71.8124, 0.505696: 69.7254, 0.550633: 67.5046, 0.59557: 65.4255, 0.640506: 63.4767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
  Sweep along r/R (PCHIP): 0.101266: 0, 0.146203: 0.0140285, 0.191139: 0.024492, 0.236076: 0.0329184, 0.281013: 0.0398175, 0.325949: 0.0454012, 0.370886: 0.0497788, 0.415823: 0.0530237, 0.460759: 0.0551981, 0.505696: 0.0563587, 0.550633: 0.0565634, 0.59557: 0.0558794, 0.640506: 0.0543615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
  Thick along r/R (PCHIP): 0.101266: 0.0910515, 0.146203: 0.0910515, 0.191139: 0.0910515, 0.236076: 0.0910515, 0.281013: 0.0910515, 0.325949: 0.0910515, 0.370886: 0.0910515, 0.415823: 0.0910515, 0.460759: 0.0910515, 0.505696: 0.0910515, 0.550633: 0.0910515, 0.59557: 0.0910515, 0.640506: 0.0910515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
  CLI along r/R (PCHIP): 0.101266: 0.7, 0.146203: 0.7, 0.191139: 0.7, 0.236076: 0.7, 0.281013: 0.7, 0.325949: 0.7, 0.370886: 0.7, 0.415823: 0.7, 0.460759: 0.7, 0.505696: 0.7, 0.550633: 0.7, 0.59557: 0.7, 0.640506: 0.7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

Propeller "PropGeom"
  location (X Y Z) -0.40843 -8.18266 0, rotation 0 0 0
  bounding box size 0.133522 2.01401 0.0793851
  Design: Diameter=2.0066 NumBlade=2 Beta34=59.2307 UseBeta34Flag=1 Feather=0.0153794 Rotate=0 Precone=0 ReverseFlag=0 FoldAngle=0 PropMode=0 AF=95.2823 CLi=0.69888 Chord=0.100373 Solidity=0.0638996 ConstructXoC=0.5 FeatherAxisXoC=0.5 FeatherOffsetXoC=0
  cross sections:
    n  RadiusFrac  shape
    0  0.101266    NACA 16-series Chord=0.00804175 IdealCl=0.7 ThickChord=0.0910515
    1  1           NACA 16-series Chord=0.082354 IdealCl=0.7 ThickChord=0.0910515
  blade curves as in "PropGeom"

Propeller "PropGeom"
  location (X Y Z) -0.40843 -16.3653 0, rotation 0 0 0
  bounding box size 0.133522 2.01401 0.0793851
  Design: Diameter=2.0066 NumBlade=2 Beta34=59.2307 UseBeta34Flag=1 Feather=0.0153794 Rotate=0 Precone=0 ReverseFlag=0 FoldAngle=0 PropMode=0 AF=95.2823 CLi=0.69888 Chord=0.100373 Solidity=0.0638996 ConstructXoC=0.5 FeatherAxisXoC=0.5 FeatherOffsetXoC=0
  cross sections:
    n  RadiusFrac  shape
    0  0.101266    NACA 16-series Chord=0.00804175 IdealCl=0.7 ThickChord=0.0910515
    1  1           NACA 16-series Chord=0.082354 IdealCl=0.7 ThickChord=0.0910515
  blade curves as in "PropGeom"

Propeller "PropGeom"
  location (X Y Z) -0.40843 -20.4566 0, rotation 0 0 0
  bounding box size 0.133522 2.01401 0.0793851
  Design: Diameter=2.0066 NumBlade=2 Beta34=59.2307 UseBeta34Flag=1 Feather=0.0153794 Rotate=0 Precone=0 ReverseFlag=0 FoldAngle=0 PropMode=0 AF=95.2823 CLi=0.69888 Chord=0.100373 Solidity=0.0638996 ConstructXoC=0.5 FeatherAxisXoC=0.5 FeatherOffsetXoC=0
  cross sections:
    n  RadiusFrac  shape
    0  0.101266    NACA 16-series Chord=0.00804175 IdealCl=0.7 ThickChord=0.0910515
    1  1           NACA 16-series Chord=0.082354 IdealCl=0.7 ThickChord=0.0910515
  blade curves as in "PropGeom"

Propeller "PropGeom"
  location (X Y Z) -0.40843 -26.5937 0.40913, rotation 0 0 0
  bounding box size 0.133522 2.01401 0.0793851
  Design: Diameter=2.0066 NumBlade=2 Beta34=59.2307 UseBeta34Flag=1 Feather=0.0153794 Rotate=0 Precone=0 ReverseFlag=0 FoldAngle=0 PropMode=0 AF=95.2823 CLi=0.69888 Chord=0.100373 Solidity=0.0638996 ConstructXoC=0.5 FeatherAxisXoC=0.5 FeatherOffsetXoC=0
  cross sections:
    n  RadiusFrac  shape
    0  0.101266    NACA 16-series Chord=0.00804175 IdealCl=0.7 ThickChord=0.0910515
    1  1           NACA 16-series Chord=0.082354 IdealCl=0.7 ThickChord=0.0910515
  blade curves as in "PropGeom"

Propeller "PropGeom"
  location (X Y Z) -0.40843 -30.685 1.02283, rotation 0 0 0
  bounding box size 0.133522 2.01401 0.0793851
  Design: Diameter=2.0066 NumBlade=2 Beta34=59.2307 UseBeta34Flag=1 Feather=0.0153794 Rotate=0 Precone=0 ReverseFlag=0 FoldAngle=0 PropMode=0 AF=95.2823 CLi=0.69888 Chord=0.100373 Solidity=0.0638996 ConstructXoC=0.5 FeatherAxisXoC=0.5 FeatherOffsetXoC=0
  cross sections:
    n  RadiusFrac  shape
    0  0.101266    NACA 16-series Chord=0.00804175 IdealCl=0.7 ThickChord=0.0910515
    1  1           NACA 16-series Chord=0.082354 IdealCl=0.7 ThickChord=0.0910515
  blade curves as in "PropGeom"

Propeller "PropGeom"
  location (X Y Z) -0.40843 -34.7763 1.73882, rotation 0 0 0
  bounding box size 0.133522 2.01401 0.0793851
  Design: Diameter=2.0066 NumBlade=2 Beta34=59.2307 UseBeta34Flag=1 Feather=0.0153794 Rotate=0 Precone=0 ReverseFlag=0 FoldAngle=0 PropMode=0 AF=95.2823 CLi=0.69888 Chord=0.100373 Solidity=0.0638996 ConstructXoC=0.5 FeatherAxisXoC=0.5 FeatherOffsetXoC=0
  cross sections:
    n  RadiusFrac  shape
    0  0.101266    NACA 16-series Chord=0.00804175 IdealCl=0.7 ThickChord=0.0910515
    1  1           NACA 16-series Chord=0.082354 IdealCl=0.7 ThickChord=0.0910515
  blade curves as in "PropGeom"

Propeller "PropGeom"
  location (X Y Z) -0.40843 4.09133 0, rotation 0 0 0
  bounding box size 0.133522 2.01401 0.0793851
  Design: Diameter=2.0066 NumBlade=2 Beta34=59.2307 UseBeta34Flag=1 Feather=0.0153794 Rotate=0 Precone=0 ReverseFlag=0 FoldAngle=0 PropMode=0 AF=95.2823 CLi=0.69888 Chord=0.100373 Solidity=0.0638996 ConstructXoC=0.5 FeatherAxisXoC=0.5 FeatherOffsetXoC=0
  cross sections:
    n  RadiusFrac  shape
    0  0.101266    NACA 16-series Chord=0.00804175 IdealCl=0.7 ThickChord=0.0910515
    1  1           NACA 16-series Chord=0.082354 IdealCl=0.7 ThickChord=0.0910515
  blade curves as in "PropGeom"

Propeller "PropGeom"
  location (X Y Z) -0.40843 8.18266 0, rotation 0 0 0
  bounding box size 0.133522 2.01401 0.0793851
  Design: Diameter=2.0066 NumBlade=2 Beta34=59.2307 UseBeta34Flag=1 Feather=0.0153794 Rotate=0 Precone=0 ReverseFlag=0 FoldAngle=0 PropMode=0 AF=95.2823 CLi=0.69888 Chord=0.100373 Solidity=0.0638996 ConstructXoC=0.5 FeatherAxisXoC=0.5 FeatherOffsetXoC=0
  cross sections:
    n  RadiusFrac  shape
    0  0.101266    NACA 16-series Chord=0.00804175 IdealCl=0.7 ThickChord=0.0910515
    1  1           NACA 16-series Chord=0.082354 IdealCl=0.7 ThickChord=0.0910515
  blade curves as in "PropGeom"

Propeller "PropGeom"
  location (X Y Z) -0.40843 16.3653 0, rotation 0 0 0
  bounding box size 0.133522 2.01401 0.0793851
  Design: Diameter=2.0066 NumBlade=2 Beta34=59.2307 UseBeta34Flag=1 Feather=0.0153794 Rotate=0 Precone=0 ReverseFlag=0 FoldAngle=0 PropMode=0 AF=95.2823 CLi=0.69888 Chord=0.100373 Solidity=0.0638996 ConstructXoC=0.5 FeatherAxisXoC=0.5 FeatherOffsetXoC=0
  cross sections:
    n  RadiusFrac  shape
    0  0.101266    NACA 16-series Chord=0.00804175 IdealCl=0.7 ThickChord=0.0910515
    1  1           NACA 16-series Chord=0.082354 IdealCl=0.7 ThickChord=0.0910515
  blade curves as in "PropGeom"

Propeller "PropGeom"
  location (X Y Z) -0.40843 20.4566 0, rotation 0 0 0
  bounding box size 0.133522 2.01401 0.0793851
  Design: Diameter=2.0066 NumBlade=2 Beta34=59.2307 UseBeta34Flag=1 Feather=0.0153794 Rotate=0 Precone=0 ReverseFlag=0 FoldAngle=0 PropMode=0 AF=95.2823 CLi=0.69888 Chord=0.100373 Solidity=0.0638996 ConstructXoC=0.5 FeatherAxisXoC=0.5 FeatherOffsetXoC=0
  cross sections:
    n  RadiusFrac  shape
    0  0.101266    NACA 16-series Chord=0.00804175 IdealCl=0.7 ThickChord=0.0910515
    1  1           NACA 16-series Chord=0.082354 IdealCl=0.7 ThickChord=0.0910515
  blade curves as in "PropGeom"

Propeller "PropGeom"
  location (X Y Z) -0.40843 26.5937 0.40913, rotation 0 0 0
  bounding box size 0.133522 2.01401 0.0793851
  Design: Diameter=2.0066 NumBlade=2 Beta34=59.2307 UseBeta34Flag=1 Feather=0.0153794 Rotate=0 Precone=0 ReverseFlag=0 FoldAngle=0 PropMode=0 AF=95.2823 CLi=0.69888 Chord=0.100373 Solidity=0.0638996 ConstructXoC=0.5 FeatherAxisXoC=0.5 FeatherOffsetXoC=0
  cross sections:
    n  RadiusFrac  shape
    0  0.101266    NACA 16-series Chord=0.00804175 IdealCl=0.7 ThickChord=0.0910515
    1  1           NACA 16-series Chord=0.082354 IdealCl=0.7 ThickChord=0.0910515
  blade curves as in "PropGeom"

Propeller "PropGeom"
  location (X Y Z) -0.40843 30.685 1.02283, rotation 0 0 0
  bounding box size 0.133522 2.01401 0.0793851
  Design: Diameter=2.0066 NumBlade=2 Beta34=59.2307 UseBeta34Flag=1 Feather=0.0153794 Rotate=0 Precone=0 ReverseFlag=0 FoldAngle=0 PropMode=0 AF=95.2823 CLi=0.69888 Chord=0.100373 Solidity=0.0638996 ConstructXoC=0.5 FeatherAxisXoC=0.5 FeatherOffsetXoC=0
  cross sections:
    n  RadiusFrac  shape
    0  0.101266    NACA 16-series Chord=0.00804175 IdealCl=0.7 ThickChord=0.0910515
    1  1           NACA 16-series Chord=0.082354 IdealCl=0.7 ThickChord=0.0910515
  blade curves as in "PropGeom"

Propeller "PropGeom"
  location (X Y Z) -0.40843 34.7763 1.73882, rotation 0 0 0
  bounding box size 0.133522 2.01401 0.0793851
  Design: Diameter=2.0066 NumBlade=2 Beta34=59.2307 UseBeta34Flag=1 Feather=0.0153794 Rotate=0 Precone=0 ReverseFlag=0 FoldAngle=0 PropMode=0 AF=95.2823 CLi=0.69888 Chord=0.100373 Solidity=0.0638996 ConstructXoC=0.5 FeatherAxisXoC=0.5 FeatherOffsetXoC=0
  cross sections:
    n  RadiusFrac  shape
    0  0.101266    NACA 16-series Chord=0.00804175 IdealCl=0.7 ThickChord=0.0910515
    1  1           NACA 16-series Chord=0.082354 IdealCl=0.7 ThickChord=0.0910515
  blade curves as in "PropGeom"
